# Константы
R := 8.3144626*joule/(mole*K)
N_A := 6.0221415*10^23*mole^-1
k_B := 1.38*10^-23*joule/K
# annotation to a formula above: from The NIST Reference on Constants, Units, and Uncertainty, from CODATA Recommended Values of the Fundamental Constants - 2002, by Peter J. Mohr and Barry N. Taylor, National Institute of Standards and Technology.
M_mol := 4.002602*gm/mole
κ := 5/3
m_i := 6.63*10^-27*kg
σ_He := 2.33*10^-10*m
n_1gm := N_A/M_mol = 1.50456e23 1/gm  # - число частиц в одном грамме газа
R_specific := R/M_mol
R_specific = 2077.26 J/(kg*K)
c_v := R_specific/(κ - 1) = 3115.9 J/(kg*K)
c_p := c_v*κ = 5193.16 J/(kg*K)
n_0 := 2.82*10^24*1/m^3 = 2.82e18 1/cm^3
c_He := 2.73
r_0 := 1 mm
m_He := m_i
u_0 := 255*m/s
T_He0 := 212 K
n_He(θ, r) := n_0*cos(π*θ/c_He)^2*(r_0/r)^2
S_He0 := m_He*u_0^2/(2*π*k_B*T_He0) = 0.023453
S_He(u) := m_He*u^2/(2*π*k_B*T_He0)
n_He(θ, r) := n_0*cos(π*θ/c_He)^2*(r_0/r)^2*(1 - 1/(2*S_He0))
A_0 := 3.26
B_0 := 0.643
d_a := 0.5 mm
C_He := 1.365
T_0 := 212 K
p_0 := 0.09 atm = 9119.25 Pa
u_0 := 1178*m/s
S_He(u_0) = 0.500506
1 - 1/(2*S_He(u_0)) = 0.00101099
ρ_0 := p_0/(R_specific*T_0) = 0.0207077 kg/m^3
ρ(θ, r_x) := ρ_0*B_0*cos(π*θ/(2*C_He))^2*(r_x/d_a)^-2
ρρ(r_x, r_y) := ρ_0*B_0*cos(π*atan(r_y/r_x)/(2*C_He))^2*(r_x/d_a)^-2
x0streak := 0.04*2*d_a = 0.04 mm
nn(r_x, r_y) := n_0*cos(π*atan(r_y/r_x)/c_He)^2*(r_x/d_a)^-2
ρ(30 deg, 1 mm) = 0.00225959 kg/m^3
pp(r_x) := p_0*((κ + 1)/(κ - 1))^(κ/(κ - 1))*((κ + 1)/(2*κ))^(1/(κ - 1))*A_0^(-2/(κ - 1))*((r_x - x0streak)/(2*d_a))^-2
a := 0 .. 180
θ[a] := -90 deg + a*1*deg
b := 0 .. 800
rsmx[b] := 0.05 mm + b*50*μm
y := 0 .. 800
rsmy[y] := -2 cm + y*(50 μm)
ρρ1[b, y] := ρρ(rsmx[b], rsmy[y])
nn1[b, y] := nn(rsmx[b], rsmy[y])
pp1[b, y] := pp(rsmx[b])
pp2[b] := pp(rsmx[b])
ρρ2 := m_i*nn1
rsmx_m := rsmx + 0.5 cm
rsmy_m := rsmy + 2 cm
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pp1 =  # no stored result
rsmx_m =  # no stored result
rsmy_m =  # no stored result
nn1 =  # no stored result
ρρ1 =  # no stored result
ρρ2 =  # no stored result
